ORIGIN := 1
i := sqrt(-1)
σ := 0.7
morley(t) := Re(exp(i*π*t)*exp(-t^2/(8*σ^2)))
mhat(t) := (1 - t^2)*exp(-t^2/2)
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M := READPRN("AVD09dayli.DAT")
N := length(M[:, 2])
N = 121
l := 1 .. N
n := 1 .. N - 1
dF[n] := M[:, 2][n + 1] - M[:, 2][n]
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Tcp := sum(M[:, 2][i]/N, i = 1 .. N)
W(a, b) := 1/a*sum(M[:, 2][k]*morley((k - b)/a), k = 1 .. N)
Wh(a, b) := 1/a*sum((M[:, 2][k] - Tcp)*morley((k - b)/a), k = 1 .. N)
dW(a, b) := sum(dF[k]*morley((k - b)/a), k = 1 .. N - 1)
k := 1 .. 15
a[1] := 1
a[k + 1] := a[k] + 1
j := 1 .. N - 1
b[1] := 1
b[j + 1] := b[j] + 1
dD[j, k] := dW(a[k], b[j])
dD2[j, k] := (dW(a[k], b[j])^2)
F[j, k] := W(a[k], b[j])
D[j, k] := Wh(a[k], b[j])
D2[j, k] := (Wh(a[k], b[j])^2)
# [component: inputs F]
# [component: inputs dD]
# [component: inputs dD2]
# [component: inputs D2]
# [component: inputs D]
Ew1_20[k] := 1/20*sum(D2[j, k], j = 31 .. 51)
Ew21_40[k] := 1/20*sum(D2[j, k], j = 52 .. 72)
Ew41_60[k] := 1/19*sum(D2[j, k], j = 73 .. 91)
Mass :=
    ka ← 0
    for k ∈ 1 .. 15
        for j ∈ 1 .. N - 1
            m[ka + j, 1] ← k*2
            m[ka + j, 2] ← k
            m[ka + j, 3] ← j
            m[ka + j, 4] ← D[j, k]
        ka ← ka + N
    ka
    m
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WRITEPRN("Morley_2014_all.dat") := Mass
tmp[k] := 2*k
mEw := augment(tmp, Ew1_20, Ew21_40, Ew41_60)
max(D) = 1.51624
WRITEPRN("Energy_2014_all.dat") := mEw
Mass2 :=
    ka ← 0
    for k ∈ 1 .. 15
        for j ∈ 1 .. N - 1
            m[ka + j, 1] ← k*2
            m[ka + j, 2] ← k
            m[ka + j, 3] ← j
            m[ka + j, 4] ← D2[j, k]
        ka ← ka + N
    ka
    m
max(dD2) = 10.3446
Mass3 :=
    ka ← 0
    for k ∈ 1 .. 15
        for j ∈ 1 .. N - 1
            m[ka + j, 1] ← k*2
            m[ka + j, 2] ← k
            m[ka + j, 3] ← j
            m[ka + j, 4] ← dD2[j, k]
        ka ← ka + N - 1
    ka
    m
WRITEPRN("Morley_2_2014_all.dat") := Mass2
WRITEPRN("Morley_3_2009_all(10-14).dat") := Mass3
